# Dimensionamento do coonversor CC-CC para microrredes
# Conexão entre banco de baterias e barramento CC
Especificações
V_bus := 380 V  # Tensão nominal do barramento CC
V_bat := 240 V  # Tensão nominal do banco de baterias
Pot := 30 kW  # Potência nominal do conversor
ΔI_L := 20 %  # Ondulação da corrente no indutor do filtro na potência nominal
ΔV_C := 2 %  # Ondulação da tensão no barramento CC
f_c := 20 kHz
# Definição do Conversor - Conversor em ponte completa (Bi-direcional)
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# Definição do Indutor do filtro de entrada:
I_L := Pot/V_bat = 125 A  # Corrente nominal média no indutor do filtro
D := (V_bus - V_bat)/V_bus = 0.368421  # Razão Cíclica nominal
D_max := 0.5  # Razão cíclica máxima para ondulação de corrente
L_1 := V_bat*D_max/(f_c*I_L*ΔI_L) = 0.00024 H  # Indutor do filtro de entrada
# Definição do Capacitor do filtro de saída:
Pot = 30000 W
I_out := Pot/V_bus = 78.9474 A  # Corrente nominal na saída do conversor
C_1 := I_out*D/(f_c*ΔV_C*V_bus) = 0.000191354 F
# Definição do Resistor equivalente de carga
R_L := V_bus/I_out = 4.81333 Ω  # Resistor nominal na saída do conversor
# Levantamento da planta de tensão do conversor Boost
j := sqrt(-1)
G_VD(ω) := V_bus*(R_L - (j*ω)*L_1/(1 - D)^2)/((j*ω)^2*R_L*C_1*L_1 + (j*ω)*L_1 + (1 - D)^2*R_L)
G_VDmod(ω) := 20*log(|G_VD(ω)*1/V|)
G_VDfase(ω) := 180/π*arg(G_VD(ω))
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# Especificação de controle para a malha de tensão do conversor Boost
f_cross := 12 Hz  # frequência de cruzamento da malha de tensão
ω_c := 2000 Hz = 2000 1/s  # frequência em rad/s
MF := 90  # Margem de fase do sistema em graus
Mf := MF*π/180 = 1.5708
ω_z := ω_c/tan(Mf - π/2 - arg(G_VD(ω_c))) = 2478.63 1/s
kc := ω_z/(sqrt(ω_c^2 + ω_z^2)*|G_VD(ω_c)|) = 0.000471235 1/V
Ki := kc*s*V*ω_z = 1.16802
C(ω) := kc*(j*ω + ω_z)/(j*ω)
FTMF(ω) := C(ω)*G_VD(ω)
# Levantamento da planta de corrente do conversor Boost
G_IL(ω) := V_bus*((j*ω)*R_L*C_1 + 2)/((1 - D)*((j*ω)^2*R_L*C_1*L_1 + (j*ω)*L_1 + (1 - D)^2*R_L))
G_ILmod(ω) := 20*log(|G_IL(ω)*1/A|)
G_ILfase(ω) := 180/π*arg(G_IL(ω))
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# Especificação de controle para a malha de tensão do conversor Boost
ω_c := 5000 Hz = 5000 1/s  # frequência em rad/s
MF := 60  # Margem de fase do sistema em graus
Mf := MF*π/180 = 1.0472
ω_z := ω_c/tan(Mf - π/2 - arg(G_IL(ω_c))) = 2324.13 1/s
kc := ω_z/(sqrt(ω_c^2 + ω_z^2)*|G_IL(ω_c)|) = 0.000530334 1/A
Ki := kc*s*V*ω_z = 1.23257 Ω
# C=KI*(wz*Ta+2)/2;
# D=KI*(wz*Ta-2)/2;
C(ω) := kc*(j*ω + ω_z)/(j*ω)
FTMF(ω) := C(ω)*G_IL(ω)
ki1 := kc*(ω_z/f_c + 2)/2 = 0.000561148 1/A
# Levantamento da planta da malha externa do conversor Boost
ki2 := kc*(ω_z/f_c - 2)/2 = -0.00049952 1/A
G_VI(ω) := (G_VD(ω)*A)/(G_IL(ω)*V)
G_VImod(ω) := 20*log(|G_VI(ω)|)
G_VIfase(ω) := 180/π*arg(G_VI(ω))
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# Especificação de controle para a malha de tensão do conversor Boost
ω_c := 80 Hz = 80 1/s  # frequência em rad/s
MF := 120  # Margem de fase do sistema em graus
Mf := MF*π/180 = 2.0944
ω_z := ω_c/tan(Mf - π/2 - arg(G_VI(ω_c))) = 124.695 1/s
1/ω_z = 0.00801958 s
kc := ω_z/(sqrt(ω_c^2 + ω_z^2)*|G_VI(ω_c)|) = 0.55408
Ki := kc*s*V*ω_z = 69.0908 V
C(ω) := kc*(j*ω + ω_z)/(j*ω)
kv1 := kc*(ω_z/f_c + 2)/2 = 0.555807
FTMF(ω) := C(ω)*G_IL(ω)
kv2 := kc*(ω_z/f_c - 2)/2 = -0.552352
